// COMSOL Multiphysics 5.2.0.166 model "Bullseye_Design_2D_center_flat_low.mph"
// Pz Design 2D center flat low
// Outline of the model tree

Parameters
  Lambda = 800[nm]  // wavelength
  PolymerThickness = 330[nm]
  d = 225 [nm]
  Period = 705[nm]
  SlitWidth = Period-ElementWidth
  SlitHeight = 150[nm]
  ElementWidth = 140[nm]
  Main = 1600[nm]  // central cavity width
  NRings = 9
  MetalThickness = 100[nm]
  MetalLength = 2*(NRings*Period)+Main
  nPolymer = 1.4867
  PolymerLength = Period*2*NRings
  RFarField = MetalLength/2+1[um]
  Metal_eps_real = -24.851
  Metal_eps_imag = 1.8557
  f0 = c_const/Lambda
  Px = 1
  Pz = 0
  FirstPeriod = Period  // first period
  MainHeight = SlitHeight
  Shift = 0

Selections
  sel1: Explicit "metal" on domains 7, 9-24

Coordinate systems
  pml1: PML "Perfectly Matched Layer 1" on domains 1-4, 6, 25-27

Geometry
  geom1 "Geometry 1" (2D, length unit µm)
    r1: Rectangle "Frame"
      pos = {0, 0.5}
      base = center
      layername = Layer 1
      layer = 0.5[um]
      layerleft = on
      layerright = on
      layertop = on
      size = {MetalLength+2[um], 5[um]}
    pt1: Point | p = {Shift, d}
    r2: Rectangle "Polymer layer" | pos = {0, 0.5*PolymerThickness}; base = center; size = {MetalLength, PolymerThickness}
    r3: Rectangle "Metal slab"
      pos = {0, -MetalThickness/2}
      base = center
      layerleft = on
      layerright = on
      layertop = on
      size = {MetalLength, MetalThickness}
    r4: Rectangle "1st Right Element"
      pos = {Main/2+ElementWidth/2, SlitHeight/2}
      base = center
      size = {ElementWidth, SlitHeight}
    r5: Rectangle "1st Left Element"
      pos = {-Main/2-ElementWidth/2, SlitHeight/2}
      base = center
      size = {ElementWidth, SlitHeight}
    arr1: Array "Right Array" | input = r4; size = {NRings-1, 1}; displ = {Period, 0}
    arr2: Array "Left Array" | input = r5; size = {NRings-1, 1}; displ = {-Period, 0}
    fin: Finalize "Form Union"

Materials
  mat1: Common "Air" on all domains
    def "Basic"
      relpermeability = 1
      relpermittivity = 1
      dynamicviscosity = eta(T[1/K])[Pa*s]
      ratioofspecificheat = 1.4
      electricconductivity = 0[S/m]
      heatcapacity = Cp(T[1/K])[J/(kg*K)]
      density = rho(pA[1/Pa],T[1/K])[kg/m^3]
      thermalconductivity = k(T[1/K])[W/(m*K)]
      soundspeed = cs(T[1/K])[m/s]
      eta: Piecewise | arg = T; pieces = {200.0, 1600.0, -8.38278E-7+8.35717342E-8*T^1-7.69429583E-11*T^2+4.6437266E-14*T^3-1.06585607E-17*T^4}
      Cp: Piecewise | arg = T; pieces = {200.0, 1600.0, 1047.63657-0.372589265*T^1+9.45304214E-4*T^2-6.02409443E-7*T^3+1.2858961E-10*T^4}
      rho: Analytic | expr = pA*0.02897/8.314/T; args = {pA, T}; dermethod = manual; argders = {{pA, d(pA*0.02897/8.314/T,pA)}, {T, d(pA*0.02897/8.314/T,T)}}
      k: Piecewise | arg = T; pieces = {200.0, 1600.0, -0.00227583562+1.15480022E-4*T^1-7.90252856E-8*T^2+4.11702505E-11*T^3-7.43864331E-15*T^4}
      cs: Analytic | expr = sqrt(1.4*287*T); args = T; dermethod = manual; argders = {T, d(sqrt(1.4*287*T),T)}
    RefractiveIndex
      n = 1
      ki = 0
  mat3: Common "PMMA [solid]" on domains 8
    def "Basic"
      dL = (dL(T[1/K])-dL(Tempref[1/K]))/(1+dL(Tempref[1/K]))
      thermalexpansioncoefficient = (alpha(T[1/K])[1/K]+(Tempref-293[K])*if(abs(T-Tempref)>1e-3,(alpha(T[1/K])[1/K]-alpha(Tempref[1/K])[1/K])/(T-Tempref),d(alpha(T[1/K]),T)[1/K]))/(1+alpha(Tempref[1/K])[1/K]*(Tempref-293[K]))
      mu = mu(T[1/K])[Pa]
      density = rho(T[1/K])[kg/m^3]
      TD = TD(T[1/K])[m^2/s]
      kappa = kappa(T[1/K])[Pa]
      relpermeability = 1
      electricconductivity = 0
      relpermittivity = nPolymer^2
      dL: Piecewise | arg = T; pieces = {293.0, 323.0, 0.00932912-1.1388E-4*T^1+2.8E-7*T^2}
      alpha: Piecewise | arg = T; pieces = {293.0, 323.0, -3.184E-5+2.8E-7*T^1}
      mu: Piecewise
        arg = T
        pieces = 
          {68.0, 125.0, 2.7459E9}
          {125.0, 400.0, 8.498712E8+3.971458E7*T^1-287911.7*T^2+846.344*T^3-0.9122308*T^4}
      rho: Piecewise | arg = T; pieces = {293.0, 323.0, 1159.216+0.3894996*T^1-9.707597E-4*T^2}
      TD: Piecewise
        arg = T
        pieces = 
          {87.0, 308.0, 2.552466E-7-5.175922E-10*T^1+2.95724E-13*T^2}
          {308.0, 460.0, -7.896105E-6+8.38529E-8*T^1-3.249648E-10*T^2+5.518894E-13*T^3-3.476433E-16*T^4}
      kappa: Piecewise
        arg = T
        pieces = 
          {68.0, 124.0, 7.923015E9}
          {124.0, 400.0, 2.054283E10-2.194785E8*T^1+1354634.0*T^2-3721.425*T^3+3.647352*T^4}
    Enu "Young's modulus and Poisson's ratio"
      youngsmodulus = E(T[1/K])[Pa]
      poissonsratio = nu(T[1/K])
      E: Piecewise
        arg = T
        pieces = 
          {68.0, 125.0, 7.3846E9}
          {125.0, 400.0, 4.31023E9+6.934433E7*T^1-528212.9*T^2+1579.615*T^3-1.742098*T^4}
      nu: Piecewise
        arg = T
        pieces = 
          {68.0, 124.0, 0.34502}
          {124.0, 270.0, 0.6787961-0.006076254*T^1+3.893231E-5*T^2-1.066899E-7*T^3+1.037697E-10*T^4}
          {270.0, 400.0, 6.00413-0.07428949*T^1+3.664807E-4*T^2-8.064015E-7*T^3+6.657131E-10*T^4}
  mat4: Common "Silver" on selection sel1
    def "Basic"
      relpermittivity = Metal_eps_real+j*Metal_eps_imag
      relpermeability = 1
      electricconductivity = 6.3e7

Physics
  emw: ElectromagneticWaves "Electromagnetic Waves, Frequency Domain" on all domains
    dependent variable E = {Ex, Ey, Ez}
    BackgroundField.w0 = 0
    BackgroundField.Ebg = {0, 0, 0}
    wee1: WaveEquationElectric (default)
    pec1: PerfectElectricConductor (default)
    init1: init "Initial Values 1" (default)
    sctr1: Scattering "Scattering Boundary Condition 1" on boundaries 1-3, 5, 7, 9, 14, 103, 108-111
    epd1: ElectricPointDipole on points 44 | enpI = {Px, abs(1-Px), 0}; normpI = 1
    ffd1: FarFieldDomain on domains 5
      ffc1: FarFieldCalculation on boundaries 10, 11, 13, 104

Mesh
  mesh1 "Mesh 1"
    size: MeshSizeDefault | hmax = Lambda/5; hmin = 5.92E-4; hauto = 1; custom = on
    ftri1: FreeTri "Free Triangular 1" on domains 5, 7-24
    map1: Map "Mapped 1" on domains 1-4, 6, 25-27
      dis1: Distribution on no boundaries | type = predefined

Studies
  std1 "Study 1"
    freq: Frequency "Frequency Domain" | punit = Hz; plist = f0

Solver configurations
  sol1 "Solution 1" (study std1)
    v1: Variables "Dependent Variables 1"
    s1: Stationary "Stationary Solver 1"
      dDef: Direct
      p1: Parametric | pname = freq; plistarr = f0; punit = Hz; pcontinuationmode = no
      fc1: FullyCoupled

Datasets
  dset1: Solution | solution = sol1

Plots
  pg1: PlotGroup2D "Electric Field (emw)" | data = dset1
    surf1: Surface | expr = emw.normE
  pg2: PolarGroup "2D Far Field (emw)" | data = dset1
    ff1: FarField | expr = emw.normEfar; phidisc = 360