// COMSOL Multiphysics 5.2.0.166 model "Cylindrical_lens_correction.mph"
// Outline of the model tree

Parameters
  lens_position = -20

Geometry
  geom1 "Geometry 1" (2D, length unit mm)
    r1: Rectangle | rot = 0; base = center; size = {1000, 1000}
    pi1: PartInstance "Cylindrical Plano-Convex Lens 2D 1"
      part = part1
      inputexpr = {10[mm], 6.7[mm], 3[mm], 1.5, 1.5}
      displ = {lens_position, 0}
      rot = -45
      selkeepnoncontr = off
    b1: BezierPolygon "Bézier Polygon 1" | p = {{-50, -50}, {-5, 5}}; degree = 1; w = {1, 1}; type = closed
    pi2: PartInstance "Cylindrical Equi-Convex Lens 2D 1"
      part = part2
      inputexpr = {25.4[mm], 40[mm], 0.1[mm], 1.5, 1.5}
      displ = {-41.7, 0}
      rot = -45
      selkeepnoncontr = off
    fin: Finalize "Form Union"
  pgeom_gop "Geometry" (1D, length unit m)
    pt1: Point
  part1 "Cylindrical Plano-Convex Lens 2D" (2D, length unit m)
    c1: Circle | pos = {R, 0}; type = solid; base = center; r = R; angleconstr = on; angle = 360
    r1: Rectangle | pos = {R-sqrt(R^2-HL^2/4), -HL/2}; type = solid; base = corner; layerbottom = on; size = {Te, HL}
    uni1: Union | input = c1, r1; intbnd = on; regularize = on
    del1: Delete "Delete Entities 1" | input = uni1(1) domains 3; compat = 4.3
    uni2: Union | input = del1; edge = all; regularize = on
    rot1: Rotate | input = uni2; rotconstr = on; rot = theta_rot*180/pi; posconstr = {on, on}
    sel1: ExplicitSelection "%All" | selection = rot1(1) domains 1; angletol = 5; selkeep = on; selshow = on
    sel2: ExplicitSelection "%Exterior" | selection = rot1(1) boundaries 1-5; angletol = 5; selkeep = on; selshow = on
    sel3: ExplicitSelection "%Convex_surface"
      selection = rot1(1) boundaries 4, 5
      angletol = 5
      selkeep = on
      selshow = on
    sel4: ExplicitSelection "%Plane_surface" | selection = rot1(1) boundaries 3; angletol = 5; selkeep = on; selshow = on
  part2 "Cylindrical Equi-Convex Lens 2D" (2D, length unit m)
    r1: Rectangle | pos = {R-sqrt(R^2-HL^2/4), -HL/2}; type = solid; base = corner; layerbottom = on; size = {Te, HL}
    c1: Circle | pos = {R, 0}; type = solid; base = center; r = R; angleconstr = on; angle = 360
    c2: Circle | pos = {R-2*sqrt(R^2-HL^2/4)+Te, 0}; type = solid; base = center; r = R; angleconstr = on; angle = 360
    uni1: Union | input = c1, c2, r1; intbnd = on; regularize = on
    del1: Delete "Delete Entities 1" | input = uni1(1) domains 3, 4, 6, 7; compat = 4.3
    uni2: Union | input = del1; edge = all; regularize = on
    rot1: Rotate | input = uni2; rotconstr = on; rot = theta_rot*180/pi; posconstr = {on, on}
    sel1: ExplicitSelection "%All" | selection = rot1(1) domains 1; angletol = 5; selkeep = on; selshow = on
    sel2: ExplicitSelection "%Exterior" | selection = rot1(1) boundaries 1-6; angletol = 5; selkeep = on; selshow = on
    sel3: ExplicitSelection "%Convex_surfaces"
      selection = rot1(1) boundaries 3-6
      angletol = 5
      selkeep = on
      selshow = on

Materials
  mat1: Common "air" on domains 1
    RefractiveIndex
      n = 1
      ki = 0
  mat2: Common "glass" on domains 2, 3
    RefractiveIndex
      n = 1.5
      ki = 0

Physics
  gop: GeometricalOptics on all domains
    dependent variable q = {qx, qy, qz}
    MaximumSecondary.MaximumSecondary = 0
    mp1: MediumProperties (default)
    wall1: Wall (default)
    matd1: MaterialDiscontinuity (default)
    op1: RayProperties | RayPropertySpecification = SpecifyVacuumWavelength; nu = 4.54e14[Hz]; lambda0 = 660[nm]; mp = 1
    inl1: Inlet on boundaries 4 | Nr = 5; RayDirectionVector = Expression; L0 = {1, 0, 0}; Nw = 4

Mesh
  mesh1 "Mesh 1" (physics-controlled)
    size: MeshSizeDefault | hauto = 5

Studies
  std1 "Study 1"
    param: Parametric "Parametric Sweep" | pname = lens_position; plistarr = range(-20,2,0); punit = mm
    rtrac: RayTracing | timestepspec = specifytime; tlist = range(0,0.01,1); lunit = cm; llist = range(0,0.01,100)

Solver configurations
  sol1 "Solution 1" (study std1)
    v1: Variables "Dependent Variables 1"
    t1: Time "Time-Dependent Solver 1"
      tlist = range(0,0.01,1)
      rtol = 1.0E-5
      atolglobalmethod = scaled
      atolglobal = 1.0E-6
      timemethod = genalpha
      estrat = exclude
      tstepsgenalpha = strict
      tout = tsteps
      fc1: FullyCoupled | linsolver = i1; jtech = once
      i1: Iterative | linsolver = gmres
        ja1: Jacobi
  sol2 "Parametric Solutions 1" (study std1)

Datasets
  dset1: Solution | solution = sol1
  ray1: Ray
    solution = sol1
    rgeomspec = fromphysics
    rgeom = pgeom_gop
    posdof = {comp1.qx, comp1.qy}
    physicsinterface = gop
  cln1: CutLine2D | data = ray1; method = twopoint; genpoints = {{11.6956, 3.89848}, {13.771, 17.3439}}
  ray2: Ray
    solution = sol1
    rgeomspec = fromphysics
    rgeom = pgeom_gop
    posdof = {comp1.qx, comp1.qy}
    physicsinterface = gop
  dset2: Solution | solution = sol2
  ray3: Ray
    solution = sol2
    rgeomspec = fromphysics
    rgeom = pgeom_gop
    posdof = {comp1.qx, comp1.qy}
    physicsinterface = gop

Plots
  pg1: PlotGroup2D "Ray Trajectories (gop)" | data = ray2
    rtrj1: RayTrajectories | linetype = line; pointtype = point
      col1: Color "Color Expression 1" | expr = t
      filt1: RayTrajectoriesFilter "Filter 1"
  pg2: PlotGroup2D "Ray Trajectories (gop) 1" | data = ray3
    rtrj1: RayTrajectories | linetype = line; pointtype = point
      col1: Color "Color Expression 1" | expr = t
      filt1: RayTrajectoriesFilter "Filter 1"