// COMSOL Multiphysics 5.2.0.166 model "Pz_Design_2D_center_flat_low.mph"
// Pz Design 2D center flat low
// Outline of the model tree

Parameters
  Lambda = 800[nm]  // wavelength
  PolymerThickness = 300[nm]
  d = 0.6*PolymerThickness
  Period = 750[nm]
  SlitWidth = Period-ElementWidth
  SlitHeight = 100[nm]
  ElementWidth = 150[nm]
  Main = 1460[nm]  // central cavity width
  NRings = 25
  MetalThickness = 100[nm]
  MetalLength = 2*(NRings+3)*Period
  nPolymer = 1.4457
  PolymerLength = Period*2*NRings
  RFarField = MetalLength/2+1[um]
  Metal_eps_real = -1.7
  Metal_eps_imag = 5.4
  f0 = c_const/Lambda
  Px = 0
  Pz = 1
  FirstPeriod = Period  // first period
  MainHeight = SlitHeight
  Shift = 0

Selections
  sel1: Explicit "Frame boundary" on no boundaries
  sel2: Explicit "PML Domain" on no domains
  sel3: Explicit "Far Field Boundary" on no boundaries
  sel4: Explicit "Far Field domain" on no domains
  sel5: Explicit "Metal Slits Domain" on no domains
  sel6: Explicit "Al Metal Parts" on no domains

Coordinate systems
  pml1: PML "Perfectly Matched Layer 1" on domains 1-4, 6, 57-59

Geometry
  geom1 "Geometry 1" (2D, length unit µm)
    r1: Rectangle "Frame"
      pos = {0, 0.5}
      base = center
      layername = Layer 1
      layer = 0.5[um]
      layerleft = on
      layerright = on
      layertop = on
      size = {MetalLength+2[um], 3[um]}
    pt1: Point | p = {Shift, d}
    r2: Rectangle "Polymer layer" | pos = {0, 0.5*PolymerThickness}; base = center; size = {MetalLength, PolymerThickness}
    r3: Rectangle "Metal slab"
      pos = {0, -MetalThickness/2}
      base = center
      layerleft = on
      layerright = on
      layertop = on
      size = {MetalLength, MetalThickness}
    r8: Rectangle "Central Element" (disabled) | pos = {0, SlitHeight/2}; base = center; size = {Main, SlitHeight}
    r4: Rectangle "1st Right Element"
      pos = {Main/2+ElementWidth/2, SlitHeight/2}
      base = center
      size = {ElementWidth, SlitHeight}
    r5: Rectangle "1st Left Element"
      pos = {-Main/2-ElementWidth/2, SlitHeight/2}
      base = center
      size = {ElementWidth, SlitHeight}
    r6: Rectangle "2nd Right Element" (disabled)
      pos = {FirstPeriod+0.5*(Period), 0.5*SlitHeight}
      base = center
      size = {(Period-SlitWidth), SlitHeight}
    r7: Rectangle "2nd Left Element" (disabled)
      pos = {-FirstPeriod-0.5*Period, SlitHeight/2}
      base = center
      size = {Period-SlitWidth, SlitHeight}
    arr1: Array "Right Array" | input = r4; size = {NRings-1, 1}; displ = {Period, 0}
    arr2: Array "Left Array" | input = r5; size = {NRings-1, 1}; displ = {-Period, 0}
    fin: Finalize "Form Union"

Materials
  mat1: Common "Air" on all domains
    def "Basic"
      relpermeability = 1
      relpermittivity = 1
      dynamicviscosity = eta(T[1/K])[Pa*s]
      ratioofspecificheat = 1.4
      electricconductivity = 0[S/m]
      heatcapacity = Cp(T[1/K])[J/(kg*K)]
      density = rho(pA[1/Pa],T[1/K])[kg/m^3]
      thermalconductivity = k(T[1/K])[W/(m*K)]
      soundspeed = cs(T[1/K])[m/s]
      eta: Piecewise | arg = T; pieces = {200.0, 1600.0, -8.38278E-7+8.35717342E-8*T^1-7.69429583E-11*T^2+4.6437266E-14*T^3-1.06585607E-17*T^4}
      Cp: Piecewise | arg = T; pieces = {200.0, 1600.0, 1047.63657-0.372589265*T^1+9.45304214E-4*T^2-6.02409443E-7*T^3+1.2858961E-10*T^4}
      rho: Analytic | expr = pA*0.02897/8.314/T; args = {pA, T}; dermethod = manual; argders = {{pA, d(pA*0.02897/8.314/T,pA)}, {T, d(pA*0.02897/8.314/T,T)}}
      k: Piecewise | arg = T; pieces = {200.0, 1600.0, -0.00227583562+1.15480022E-4*T^1-7.90252856E-8*T^2+4.11702505E-11*T^3-7.43864331E-15*T^4}
      cs: Analytic | expr = sqrt(1.4*287*T); args = T; dermethod = manual; argders = {T, d(sqrt(1.4*287*T),T)}
    RefractiveIndex
      n = 1
      ki = 0
  mat2: Common "Gold [solid]" on domains 7, 9-56
    def "Basic"
      dL = (dL(T[1/K])-dL(Tempref[1/K]))/(1+dL(Tempref[1/K]))
      CTE = CTE(T[1/K])[1/K]
      thermalconductivity = k_solid_1(T[1/K])[W/(m*K)]
      resistivity = res_solid_1(T[1/K])[ohm*m]
      thermalexpansioncoefficient = (alpha(T[1/K])[1/K]+(Tempref-293[K])*if(abs(T-Tempref)>1e-3,(alpha(T[1/K])[1/K]-alpha(Tempref[1/K])[1/K])/(T-Tempref),d(alpha(T[1/K]),T)[1/K]))/(1+alpha(Tempref[1/K])[1/K]*(Tempref-293[K]))
      heatcapacity = C_solid_1(T[1/K])[J/(kg*K)]
      HC = HC_solid_1(T[1/K])[J/(mol*K)]
      mu = mu(T[1/K])[Pa]
      electricconductivity = sigma_solid_1(T[1/K])[S/m]
      density = rho(T[1/K])[kg/m^3]
      VP = VP_solid_1(T[1/K])[Pa]
      kappa = kappa(T[1/K])[Pa]
      relpermeability = 1
      relpermittivity = -1.7-5.4*j
      dL: Piecewise | arg = T; pieces = {86.0, 1003.0, -0.003767805+1.179943E-5*T^1+3.792275E-9*T^2-5.959619E-13*T^3}
      CTE: Piecewise
        arg = T
        pieces = 
          {86.0, 200.0, 4.040319E-6+1.106436E-7*T^1-4.389255E-10*T^2+5.990814E-13*T^3}
          {200.0, 1003.0, 1.237291E-5+5.169284E-9*T^1-5.528527E-14*T^2}
      k_solid_1: Piecewise
        arg = T
        pieces = 
          {0.0, 14.0, 496.8118*T^1+41.00857*T^2-10.46095*T^3+0.5579006*T^4-0.009429161*T^5}
          {14.0, 45.0, 7977.526-554.7566*T^1+14.56751*T^2-0.1468484*T^3+3.231278E-4*T^4}
          {45.0, 85.0, 3568.586-199.4435*T^1+5.171042*T^2-0.06880706*T^3+4.612091E-4*T^4-1.23215E-6*T^5}
          {85.0, 1338.0, 330.6431-0.02536626*T^1-8.191375E-5*T^2+6.792908E-8*T^3-2.15362E-11*T^4}
      res_solid_1: Piecewise "Piecewise 1a"
        arg = T
        pieces = 
          {1.0, 25.0, 2.194815E-10+1.027514E-12*T^1-3.409278E-13*T^2+3.010164E-14*T^3}
          {25.0, 60.0, 1.390641E-9-1.228888E-10*T^1+4.182944E-12*T^2-2.773737E-14*T^3}
          {60.0, 400.0, -2.210068E-9+9.057611E-11*T^1-4.632985E-14*T^2+6.950205E-17*T^3}
          {400.0, 1338.0, -1.145028E-9+7.877041E-11*T^1-4.720065E-16*T^2+1.275961E-17*T^3}
      alpha: Piecewise
        arg = T
        pieces = 
          {86.0, 212.0, 1.221837E-5+1.15298E-8*T^1-1.573678E-11*T^2}
          {212.0, 1003.0, 1.436173E-5-4.015912E-9*T^1+1.10929E-11*T^2-5.625535E-15*T^3}
      C_solid_1: Piecewise "Piecewise 1b" | arg = T; pieces = {293.0, 1338.0, 399352.2*T^-2+114.8987+0.03228805*T^1}
      HC_solid_1: Piecewise "Piecewise 1c" | arg = T; pieces = {293.0, 1338.0, 78659.2*T^-2+22.63126+0.00635968*T^1}
      mu: Piecewise | arg = T; pieces = {293.0, 1280.0, 2.682905E10+142041.4*T^1-7037.486*T^2}
      sigma_solid_1: Piecewise "Piecewise 1d"
        arg = T
        pieces = 
          {1.0, 25.0, 1/(3.010164E-14*T^3-3.409278E-13*T^2+1.027514E-12*T+2.194815E-10)}
          {25.0, 60.0, 1/(-2.773737E-14*T^3+4.182944E-12*T^2-1.228888E-10*T+1.390641E-09)}
          {60.0, 400.0, 1/(6.950205E-17*T^3-4.632985E-14*T^2+9.057611E-11*T-2.210068E-09)}
          {400.0, 1338.0, 1/(1.275961E-17*T^3-4.720065E-16*T^2+7.877041E-11*T-1.145028E-09)}
      rho: Piecewise | arg = T; pieces = {86.0, 1003.0, 19501.44-0.6933844*T^1-2.041944E-4*T^2+4.297982E-8*T^3}
      VP_solid_1: Piecewise "Piecewise 1e" | arg = T; pieces = {293.0, 1337.0, (exp((-1.934300e+004/T-7.479000e-001*log10(T)+1.203281e+001)*log(10.0)))*1.333200e+002}
      kappa: Piecewise | arg = T; pieces = {293.0, 1280.0, 2.224306E11-913189.7*T^1-37420.01*T^2}
    Enu "Young's modulus and Poisson's ratio"
      youngsmodulus = E(T[1/K])[Pa]
      poissonsratio = nu(T[1/K])
      E: Piecewise
        arg = T
        pieces = 
          {0.0, 93.0, 8.190431E10-2.049635E7*T^1-8937.063*T^2}
          {93.0, 293.0, 8.249999E10-3.153455E7*T^1+48127.92*T^2-72.49967*T^3+0.02725845*T^4}
          {293.0, 1280.0, 7.736733E10+425187.2*T^1-20070.07*T^2}
      nu: Piecewise | arg = T; pieces = {293.0, 1280.0, 0.4403494+8.884688E-6*T^1-1.158876E-8*T^2+1.023495E-11*T^3}
  mat3: Common "PMMA [solid]" on domains 8
    def "Basic"
      dL = (dL(T[1/K])-dL(Tempref[1/K]))/(1+dL(Tempref[1/K]))
      thermalexpansioncoefficient = (alpha(T[1/K])[1/K]+(Tempref-293[K])*if(abs(T-Tempref)>1e-3,(alpha(T[1/K])[1/K]-alpha(Tempref[1/K])[1/K])/(T-Tempref),d(alpha(T[1/K]),T)[1/K]))/(1+alpha(Tempref[1/K])[1/K]*(Tempref-293[K]))
      mu = mu(T[1/K])[Pa]
      density = rho(T[1/K])[kg/m^3]
      TD = TD(T[1/K])[m^2/s]
      kappa = kappa(T[1/K])[Pa]
      relpermeability = 1
      electricconductivity = 0
      relpermittivity = 2.16
      dL: Piecewise | arg = T; pieces = {293.0, 323.0, 0.00932912-1.1388E-4*T^1+2.8E-7*T^2}
      alpha: Piecewise | arg = T; pieces = {293.0, 323.0, -3.184E-5+2.8E-7*T^1}
      mu: Piecewise
        arg = T
        pieces = 
          {68.0, 125.0, 2.7459E9}
          {125.0, 400.0, 8.498712E8+3.971458E7*T^1-287911.7*T^2+846.344*T^3-0.9122308*T^4}
      rho: Piecewise | arg = T; pieces = {293.0, 323.0, 1159.216+0.3894996*T^1-9.707597E-4*T^2}
      TD: Piecewise
        arg = T
        pieces = 
          {87.0, 308.0, 2.552466E-7-5.175922E-10*T^1+2.95724E-13*T^2}
          {308.0, 460.0, -7.896105E-6+8.38529E-8*T^1-3.249648E-10*T^2+5.518894E-13*T^3-3.476433E-16*T^4}
      kappa: Piecewise
        arg = T
        pieces = 
          {68.0, 124.0, 7.923015E9}
          {124.0, 400.0, 2.054283E10-2.194785E8*T^1+1354634.0*T^2-3721.425*T^3+3.647352*T^4}
    Enu "Young's modulus and Poisson's ratio"
      youngsmodulus = E(T[1/K])[Pa]
      poissonsratio = nu(T[1/K])
      E: Piecewise
        arg = T
        pieces = 
          {68.0, 125.0, 7.3846E9}
          {125.0, 400.0, 4.31023E9+6.934433E7*T^1-528212.9*T^2+1579.615*T^3-1.742098*T^4}
      nu: Piecewise
        arg = T
        pieces = 
          {68.0, 124.0, 0.34502}
          {124.0, 270.0, 0.6787961-0.006076254*T^1+3.893231E-5*T^2-1.066899E-7*T^3+1.037697E-10*T^4}
          {270.0, 400.0, 6.00413-0.07428949*T^1+3.664807E-4*T^2-8.064015E-7*T^3+6.657131E-10*T^4}

Physics
  emw: ElectromagneticWaves "Electromagnetic Waves, Frequency Domain" on all domains
    dependent variable E = {Ex, Ey, Ez}
    wee1: WaveEquationElectric (default)
    pec1: PerfectElectricConductor (default)
    init1: init "Initial Values 1" (default)
    sctr1: Scattering "Scattering Boundary Condition 1" on boundaries 1-3, 5, 7, 9, 14, 263, 268-271
    epd1: ElectricPointDipole (disabled) on points 108 | enpI = {Px, abs(1-Px), 0}; normpI = 1
    lco1: LineCurrentOutOfPlane on points 108 | Iop = 1
    ffd1: FarFieldDomain on domains 5
      ffc1: FarFieldCalculation on boundaries 10, 11, 13, 264

Mesh
  mesh1 "Mesh 1"
    size: MeshSizeDefault | hmax = 0.296; hmin = 5.92E-4; hauto = 1; custom = on
    size1: Size on no domains | hmax = Lambda/20; hauto = 5; custom = on
    size2: Size on selection sel6 | hmax = Lambda/15; hauto = 5; custom = on
    ftri1: FreeTri "Free Triangular 1" on all domains
    map1: Map "Mapped 1" on no domains
      dis1: Distribution on no boundaries | type = predefined

Studies
  std1 "Study 1"
    freq: Frequency "Frequency Domain" | plist = f0; punit = Hz

Solver configurations
  sol1 "Solver 1" (study std1)
    v1: Variables "Dependent Variables 1"
    s1: Stationary "Stationary Solver 1"
      dDef: Direct
      p1: Parametric | pname = freq; plistarr = f0; punit = Hz; pcontinuationmode = no
      fc1: FullyCoupled | linsolver = dDef

Datasets
  dset1: Solution | solution = sol1

Plots
  pg1: PlotGroup2D "Electric Field (emw)" | data = dset1
    surf1: Surface | expr = emw.normE
  pg2: PolarGroup "Polar Plot Group 2" | data = dset1
    ff1: FarField | data = dset1; expr = emw.normEfar; phidisc = 360

Exports
  plot1: Plot | filename = D:\Comsol Matlab Models\PzCenterFlat.txt