// COMSOL Multiphysics 5.2.0.166 model "freespace.mph"
// Outline of the model tree

Parameters
  lambda = 700 [nm]  // wavelength

Coordinate systems
  pml1: PML "Perfectly Matched Layer 1" on domains 1-4, 6-9

Geometry
  geom1 "Geometry 1" (2D, length unit µm)
    r1: Rectangle
      base = center
      layername = Layer 1
      layer = lambda/2
      layerleft = on
      layerright = on
      layertop = on
      size = {10, 10}
    pt1: Point "dipole_pos" | contributeto = csel2
    pt2: Point "dipole_pos 1" | contributeto = csel1; p = {0.01, 0}
    fin: Finalize "Form Union"

Materials
  mat1: Common "air" on all domains
    def "Basic"
      relpermittivity = 1
      relpermeability = 1
      electricconductivity = 0

Physics
  emw: ElectromagneticWaves "Electromagnetic Waves, Frequency Domain" on all domains
    dependent variable E = {Ex, Ey, Ez}
    MeshControl.EnableMeshControl = 1
    MeshControl.PhysicsControlledMeshMaximumElementSize = lambda/5
    wee1: WaveEquationElectric (default)
    pec1: PerfectElectricConductor (default)
    init1: init "Initial Values 1" (default)
    epd1: ElectricPointDipole on selection geom1_csel2_pnt | enpI = {1, 0, 0}; normpI = 1
    sctr1: Scattering "Scattering Boundary Condition 1" on boundaries 1-3, 5, 7, 9, 14, 16, 21-24
    ffd1: FarFieldDomain on all domains
      ffc1: FarFieldCalculation on boundaries adjacent to domains 5
    lco1: LineCurrentOutOfPlane on selection geom1_csel1_pnt | Iop = 1

Mesh
  mesh1 "Mesh 1" (physics-controlled)
    size: MeshSizeDefault | hauto = 5

Studies
  std1 "Study 1"
    freq: Frequency "Frequency Domain" | punit = Hz; plist = c_const/lambda

Solver configurations
  sol1 "Solution 1" (study std1)
    v1: Variables "Dependent Variables 1"
    s1: Stationary "Stationary Solver 1"
      dDef: Direct
      p1: Parametric | pname = freq; plistarr = c_const/lambda; punit = Hz; pcontinuationmode = no
      fc1: FullyCoupled

Datasets
  dset1: Solution | solution = sol1

Plots
  pg1: PlotGroup2D "Electric Field (emw)" | data = dset1
    surf1: Surface | expr = emw.normE
  pg2: PolarGroup "2D Far Field (emw)" | data = dset1; rmax = 242789.75
    ff1: FarField | expr = emw.normEfar